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/batch
! ANSYS input file written by Workbench version 18.2 RELEASE
! File used for geometry attach: C:\Users\Saraswathi Andappan\AppData\Local\Temp\WB_LAPTOP-038T22HH_Saraswathi Andappan_11608_13\unsaved_project_files\dp0\SYS\DM\SYS.scdoc
/title,1D Heat Conduction--Steady-State Thermal (B5)
/com,--- Data in consistent MKS units. See Solving Units in the help system for more information.
/units,MKS
/prep7
! Turn off shape checking because checks already performed inside WB mesher.
! See help system for more information.
SHPP,OFF,,NOWARN
etcon,set             ! allow ANSYS to choose best KEYOP's for 180x elements
/com,*********** Nodes for the whole assembly ***********
nblock,3,,15
(1i9,3e20.9e3)
        1    0.000000000E+000    1.000000000E+000    0.000000000E+000
        2    0.000000000E+000    0.000000000E+000    0.000000000E+000
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-1
/com,*********** Elements for Body 1 "SYS\Surface" ***********
et,1,55
keyo,1,3,3
eblock,19,solid,,6
(19i9)
        1        1        1        1        0        0        0        0        4        0        1        4        5       14        3
        1        1        1        1        0        0        0        0        4        0        2        5        6       13       14
        1        1        1        1        0        0        0        0        4        0        3        6        7       12       13
        1        1        1        1        0        0        0        0        4        0        4        7        8       11       12
        1        1        1        1        0        0        0        0        4        0        5        8        9       10       11
        1        1        1        1        0        0        0        0        4        0        6        9        1        2       10
-1
/com,*********** Send User Defined Coordinate System(s) ***********
local,12,0,1.,0.,0.,-0.,0.,0.
local,13,0,2.,0.,0.,-0.,0.,0.
local,14,0,3.,0.,0.,-0.,0.,0.
csys,0
toffst,273.15,  ! Temperature offset from absolute zero
/com,*********** Send Materials ***********
MP,KXX,1,1,	! W m^-1 C^-1

/com,*********** Send Sheet Properties ***********
r,1,1.
!************************* Model Summary ********************
!SYS\Surface,	NEU,	matid,	1
!************************* End Model Summary ********************
/com,*********** Define Temperature Constraint ***********
CMBLOCK,_CM63   ,NODE,        2
(8i10)
         1         2

*DIM,_loadvari63,TABLE,2,1,1,TIME,
! Time values
_loadvari63(1,0,1) = 0.
_loadvari63(2,0,1) = 1.
! Load values
_loadvari63(1,1,1) = 22.
_loadvari63(2,1,1) = 0.

/com,*********** Create "Heat Flux" ***********
et,2,151
keyop,2,3,10   !get plane option and thickness from underlying element
eblock,10,,,1
(15i9)
        7        2        2        2        0        4        3
-1
esel,s,type,,2
keyop,2,8,1      ! include heat flux

*DIM,_loadvari53,TABLE,2,1,1,TIME,
! Time values
_loadvari53(1,0,1) = 0.
_loadvari53(2,0,1) = 1.
! Load values
_loadvari53(1,1,1) = 0.
_loadvari53(2,1,1) = -0.5

esel,all
fcum,add                   ! add nodal forces up (needed in case have loads on the same edge,vertex)
fcum                       ! reset default on fcum command since done sending WB F loads
/com,*********** Create "Internal Heat Generation" ***********
esel,none
esel,a,mat,,1
cm,_CM51,elem
esel,all

*DIM,_loadvari51,TABLE,2,1,1,TIME,
! Time values
_loadvari51(1,0,1) = 0.
_loadvari51(2,0,1) = 1.
! Load values
_loadvari51(1,1,1) = 0.
_loadvari51(2,1,1) = 2.

/com,***************** Define Uniform Initial temperature ***************
tunif,22.
fini
/com,****************************************************************************
/com,*************************    SOLUTION       ********************************
/com,****************************************************************************
/solu
antype,0                   ! static analysis
!eqsl,sparse               ! using sparse solver which is default so no eqsl command needed
cntr,print,1               ! print out contact info and also make no initial contact an error
rescontrol,,none                 ! Do not keep any restart files
dmpoption,emat,no             ! Don't combine emat file for DANSYS
dmpoption,esav,no             ! Don't combine esav file for DANSYS
/com,****************************************************
/com,******************* SOLVE FOR LS 1 OF 1 ****************
d,_CM63,temp,%_loadvari63%
esel,s,type,,2
nsle
sf,all,hflux,%_loadvari53%
nsel,all
esel,all
bfe,_CM51,hgen,,%_loadvari51%
autots,on
nsub,1,10,1
time,1.
outres,erase
outres,all,none
outres,nsol,all
outres,rsol,all
outres,fflux,all
cnvtol,heat,,.001,,1.e-006       ! Program Controlled. Set MINREF equivalent of 1e-6 Watts
! *********** WB SOLVE COMMAND ***********
! check interactive state
*get,ANSINTER_,active,,int
*if,ANSINTER_,ne,0,then
/eof
*endif
solve
/com *************** Write FE CONNECTORS *********
CEWRITE,file,ce,,INTE
/com,****************************************************
/com,*************** FINISHED SOLVE FOR LS 1 *************
/post1
fini
